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/batch
! ANSYS input file written by Workbench version 2023 R1
! File used for geometry attach: C:\Users\User\AppData\Local\Temp\WB_Petro3_Jacson_11668_2\wbnew_files\dp0\SYS\DM\SYS.scdoc
/title,perforated_plate_validation--Harmonic Acoustics (A5)
/COM,/COM,     ANSYSMotion, 2023.1
/com,--- Data in consistent MKS units. See Solving Units in the help system for more information.
/units,MKS
/prep7
! Turn off shape checking because checks already performed inside WB mesher.
! See help system for more information.
SHPP,OFF,,NOWARN
etcon,set             ! allow ANSYS to choose best KEYOP's for 180x elements, resets any applicable keyopt to MAPDL defaults
/com,*********** Nodes for the whole assembly ***********
nblock,3,,5976
(1i9,3e20.9e3)
        1     0.000000000E+00     1.500000000E-01     1.000000000E-01
        2     0.000000000E+00    -1.500000000E-01     1.000000000E-01
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-1
/com,*********** Elements for Body 1 "Component1\Ressalto-extrus_o2" ***********
et,1,30
r,1,2.e-005,101325.
keyo,1,2,1          ! uncoupled acoustic element without FSI
eblock,19,solid,,13011
(19i9)
        1        1        1        1        0        0        0        0        8        0        1     1988     3142     3680     3680     3402     3402     3402     3402
        1        1        1        1        0        0        0        0        8        0        2     1988     2980     3680     3680     3142     3142     3142     3142
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-1
/com,*********** Elements for Body 2 "Component2\Ressalto-extrus_o1" ***********
et,2,30
r,2,2.e-005,101325.
keyo,2,2,1          ! uncoupled acoustic element without FSI
eblock,19,solid,,13208
(19i9)
        2        2        2        2        0        0        0        0        8        0    13012     3759     5433     4037     4037     4457     4457     4457     4457
        2        2        2        2        0        0        0        0        8        0    13013     3759     4059     5433     5433     4457     4457     4457     4457
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-1
/com,*********** Send User Defined Coordinate System(s) ***********
csys,0
toffst,273.15,  ! Temperature offset from absolute zero
/com,*********** Set Reference Temperature ***********
tref,22.
/com,*********** Send Materials ***********
MP,MURX,1,1,
MP,DENS,1,1.204263,	! kg m^-3
MP,SONC,1,343.395034,	! m s^-1
MP,VISC,1,1.8247e-05,	! Pa s
MP,KXX,1,0.025503,	! W m^-1 C^-1
MP,C,1,1006.400178,	! J kg^-1 C^-1

MP,MURX,2,1,
MP,DENS,2,1.204263,	! kg m^-3
MP,SONC,2,343.395034,	! m s^-1
MP,VISC,2,1.8247e-05,	! Pa s
MP,KXX,2,0.025503,	! W m^-1 C^-1
MP,C,2,1006.400178,	! J kg^-1 C^-1

!************************* Model Summary ********************
!Component1\Ressalto-extrus_o2,	Air_20C,	matid,	1
!Component2\Ressalto-extrus_o1,	Air_20C,	matid,	2
!************************* End Model Summary ********************
/com,*********** Send Named Selection as Element Component ***********
esel,s,type,,1
esel,a,type,,2
cm,NONE,elem
esel,all
/com,*********** Send Named Selection as Node Component ***********
CMBLOCK,OUTPUT_FACE,NODE,       73
(8i10)
       177       207       208       209       210       211       212       213
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/com,*********** Send Named Selection as Node Component ***********
CMBLOCK,INPUT_FACE,NODE,       71
(8i10)
        11        41        42        43        44        45        46        47
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/com,*********** Send Named Selection as Node Component ***********
CMBLOCK,MIDDLE_FACE,NODE,       71
(8i10)
         1         2         3         4         5         6         7         8
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/com,*********** Send Named Selection as Node Component ***********
CMBLOCK,INPUT_EDGES,NODE,       30
(8i10)
        11        41        42        43        44        45        46        47
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/com,*********** Send Named Selection as Node Component ***********
CMBLOCK,OUTPUT_EDGES,NODE,       30
(8i10)
       177       207       208       209       210       211       212       213
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
/com,*********** Create Impedance Boundary ***********
CMBLOCK,_CMACOUSTICSFIMPD47,NODE,      144
(8i10)
        11        41        42        43        44        45        46        47
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
cmsel,s,_CMACOUSTICSFIMPD47
sf,_CMAcousticSFIMPD47,impd,413.538,0       ! Impedance
allsel,all


/com,*********** Begin Program Controlled Acoustic Far-field Radiation Surface ***********

esel,s,type,,1
esel,a,type,,2
CMBLOCK,_CM_EQV_SRC_SURFACE138,NODE,      144
(8i10)
        11        41        42        43        44        45        46        47
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
cmsel,s,_CM_EQV_SRC_SURFACE138
sf,_CM_EQV_SRC_SURFACE138,mxwf,
allsel,all


/com,*********** End Program Controlled Acoustic Far-field Radiation Surface ***********


/com,*********** Create Impedance Sheet ***********
CMBLOCK,_CMACOUSTICBFIMPD49,NODE,       71
(8i10)
         1         2         3         4         5         6         7         8
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cmsel,s,_CMACOUSTICBFIMPD49
bf,all,impd,10,0
allsel,all


/com,*********** Create Surface Velocity ***********
CMBLOCK,_CMACOUSTICSURFVELO56,NODE,       71
(8i10)
        11        41        42        43        44        45        46        47
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cmsel,s,_CMACOUSTICSURFVELO56
sf,_CMAcousticSURFVELO56,shld,1,0
allsel,all

fini
/solu
antype,harm
hropt,auto
thexpand,off     ! ignore thermal strains
kbc,1
harfrq,0,1400
nsub,280
asol,scat,off
outres,erase
outres,all,none
outres,nsol,all
outres,eangl,all
outres,etmp,all
outres,veng,all
esel,s,mat,,1
esel,a,mat,,2
cm,_elmisc,elem
esel,all
outres,misc,all,_elmisc
outres,fgrad,all
! *********** WB SOLVE COMMAND ***********
! check interactive state
*get,ANSINTER_,active,,int
*if,ANSINTER_,ne,0,then
/eof
*endif
solve
/com *************** Write FE CONNECTORS *********
CEWRITE,file,ce,,INTE
fini
*get,_NSOLTHREADS,active,0,ntfs
*get,_NSOLPROCESSES,active,0,npfs
/post1
fini
