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/batch
!/CLEAR,NOSTART
! ANSYS input file written by Workbench version 2023 R2
! File used for geometry attach: C:\Users\Petro3_ii\Desktop\Validacoes\Vibra\hex8_extra_shape_function\CAD\cuboid_example.STEP
/title,cuboide_hex8_esf--Harmonic Response (B5)
/COM,/COM,     ANSYSMotion, 2023.2
/com,--- Data in consistent MKS units. See Solving Units in the help system for more information.
/units,MKS
/prep7
! Turn off shape checking because checks already performed inside WB mesher.
! See help system for more information.
SHPP,OFF,,NOWARN
etcon,set             ! allow ANSYS to choose best KEYOP's for 180x elements, resets any applicable keyopt to MAPDL defaults
/com,*********** Nodes for the whole assembly ***********
nblock,3,,7984
(1i9,3e20.9e3)
        1     8.996665648E-01     2.517174856E-02     1.988835144E-01
        2     9.248812830E-01     2.512857944E-02     1.736180997E-01
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-1
/com,*********** Elements for Body 1 "cuboid_example-FreeParts|Ressalto-extrus_o1" ***********
et,1,solid45
!
KEYOPT,1,1,1
KEYOPT,1,2,0
KEYOPT,1,4,0
KEYOPT,1,5,0
KEYOPT,1,6,0
!
eblock,19,solid,,5760
(19i9)
        1        1        1        1        0        0        0        0        8        0        1     1940     1943     1946     1942     2642     2650     2685     2682
        1        1        1        1        0        0        0        0        8        0        2     1922     1924     1943     1940     2644     2678     2650     2642
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-1
/com,*********** Send User Defined Coordinate System(s) ***********
csys,0
toffst,273.15,  ! Temperature offset from absolute zero
/com,*********** Set Reference Temperature ***********
tref,22.
/com,*********** Send Materials ***********
Temperature = 'TEMP' ! Temperature
MP,DENS,1,7850,	! kg m^-3
MP,C,1,434,	! J kg^-1 C^-1
MP,KXX,1,60.5,	! W m^-1 C^-1
MP,RSVX,1,1.7e-07,	! kg m^3 A^-2 s^-3
MP,EX,1,200000000000,	! Pa
MP,NUXY,1,0.3,
MP,MURX,1,10000,

!************************* Model Summary ********************
!cuboid_example-FreeParts|Ressalto-extrus_o1,	Structural Steel,	matid,	1
!************************* End Model Summary ********************
/com,*********** Send Named Selection as Node Component ***********
CMBLOCK,INPUT_FACE,NODE,      119
(8i10)
      4724      4725      4726      4730      4742      4843      4844      5151
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/com,*********** Send Named Selection as Node Component ***********
CMBLOCK,OUTPUT_FACE,NODE,      119
(8i10)
      4721      4722      4723      4729      4735      4805      4806      5148
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/com,*********** Fixed Supports ***********
CMBLOCK,_FIXEDSU,NODE,      119
(8i10)
      4724      4725      4726      4730      4742      4843      4844      5151
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cmsel,s,_FIXEDSU
d,all,all
nsel,all
/com,*********** Define Force Without Surface Effect Elements "Force" ***********
local,12,0,0.,0.,0.,0.,0.,0.
csys,0
CMBLOCK,_CM198_3,ELEM,        9
(8i10)
      5731      5735      5739      5743      5746      5749      5752      5755
      5758
CMBLOCK,_CM198_4,ELEM,        7
(8i10)
      5732      5736      5741      5745      5750      5757      5759
CMBLOCK,_CM198_6,ELEM,       80
(8i10)
      3740      3741      3742      3743      3745      3746      3747      3748
      3767      3768      3770      3772      3773      3774      3775      3776
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
cmsel,s,OUTPUT_FACE
F,ALL,FY,1,
nsel,all
esel,all

/solu
antype,harm
hropt,full
thexpand,off     ! ignore thermal strains
kbc,1
harfrq,0,2000
nsub,100
outres,erase
outres,all,none
outres,nsol,all
outres,eangl,all
outres,etmp,all
outres,veng,all
outres,strs,all
outres,epel,all
outres,rsol,all
outres,cont,all

EMATWRITE, YES
WRFULL,YES

SOLVE

FINISH
/POST26

FILE,'file','rst','.'
/UI,COLL,1
NUMVAR,200
SOLU,191,NCMIT
STORE,MERGE
PLCPLX,0
PRCPLX,1
FILLDATA,191,,,,1,1
REALVAR,191,191

NSOL,2,6269,U,Y, UY_3,
STORE,MERGE

NSOL,3,6210,U,Y, UY_4,
STORE,MERGE

NSOL,4,5522,U,Y, UY_5,
STORE,MERGE

NSOL,5,4882,U,Y, UY_6,
STORE,MERGE

NSOL,6,4882,U,Z, UZ_6,
STORE,MERGE

ANSOL,7,6269,S,X,SX_7
STORE,MERGE

ANSOL,8,6269,S,Y,SY_8
STORE,MERGE

ANSOL,9,6269,S,Z,SZ_9
STORE,MERGE

node_c = 6269

ESOL,10,3838,node_c,S,X
STORE,MERGE

ESOL,11,3824,node_c,S,X
STORE,MERGE

ESOL,12,3784,node_c,S,X
STORE,MERGE

ESOL,13,3793,node_c,S,X
STORE,MERGE

ANSOL,14,node_c,S,X,SX_14
STORE,MERGE

XVAR,1
PLVAR,2,

! Save time history variables to file response_uy_node_6269.dat
*CREATE,scratch,gui
*DEL,_P26_EXPORT
*DIM,_P26_EXPORT,TABLE,100,2
VGET,_P26_EXPORT(1,0),1
VGET,_P26_EXPORT(1,1),2,,0
VGET,_P26_EXPORT(1,2),2,,1
/OUTPUT,'response_uy_node_6269','dat','.'
*VWRITE,'FREQ','UY_3',' '
%14C %14C %14C
*VWRITE,' ','REAL','IMAGINARY'
%14C %14C %14C
*VWRITE,_P26_EXPORT(1,0),_P26_EXPORT(1,1),_P26_EXPORT(1,2)
%14.5G %14.5G %14.5G
/OUTPUT,TERM
*END
/INPUT,scratch,gui
! End of time history save

FINISH
/PREP7
NSEL, S, NODE, , node_c
ESLN, S, 0
ELIST
ALLSEL, ALL

!/POST1
/AUX2

! commands to create dense matrix

! Stiffness global matrix
*DMAT,K_MatrixDense,D,IMPORT,FULL,file1.full,STIFF
*EXPORT,K_MatrixDense,CSV,Kdense_full.csv,24,
!*PRINT,K_MatrixDense,Kdense_full.dat

*DO, n_el, 1, 10, 1

*DMAT, MatK, D, IMPORT, EMAT, file1.emat, STIFF, n_el
*EXPORT, MatK, MMF, Ke_%n_el.txt

*DMAT, MatM, D, IMPORT, EMAT, file1.emat, MASS, n_el
*EXPORT, MatM, MMF, Me_%n_el.txt

*ENDDO

FINISH
